clock {
    timezone PST+8PDT;
    starttime '2000-09-01 0:00:00';
    stoptime '2000-09-03 0:00:00';
}

module tape;

class player {
    double value;
}

object player {
    name LMP;
    file SG_LNODE13A.player;
}

object recorder {
    parent LMP;
    property value;
    file lmp_value.csv;
};
