// Weather information
object recorder {
	parent "RegionalWeather";
	property temperature,humidity,solar_flux;
	interval 60;
	file ./outputFiles/weather.csv;
}

// Net load at substation
object recorder {
	parent network_node;
	property distribution_load,positive_sequence_voltage;
	interval 60;
	file ./outputFiles/substation_load.csv;
}

// Energyplus load
//object recorder {
//	parent Eplus_meter;
//	property measured_real_power,measured_reactive_power,measured_voltage_AB;
//	interval 60;
//	file eplus_load.csv;
//}

// house debugging
object recorder {
	parent F1_house_B22;
	property cooling_setpoint,heating_setpoint,air_temperature,outdoor_temperature,hvac_load,last_cooling_load,system_mode;
	interval 60;
	file ./outputFiles/F1_house_B22.csv;
}


object multi_recorder {
  file ./outputFiles/hvac_loads_states.csv;
  interval 15;
  property network_node:distribution_load.real, F1_house_A5:hvac_load, F1_house_A8:hvac_load, F1_house_A9:hvac_load, F1_house_A11:hvac_load, F1_house_A12:hvac_load, F1_house_A13:hvac_load, F1_house_A15:hvac_load, F1_house_A16:hvac_load, F1_house_A25:hvac_load, F1_house_A26:hvac_load, F1_house_A28:hvac_load, F1_house_B0:hvac_load, F1_house_B3:hvac_load, F1_house_B4:hvac_load, F1_house_B6:hvac_load, F1_house_B7:hvac_load, F1_house_B19:hvac_load, F1_house_B20:hvac_load, F1_house_B22:hvac_load, F1_house_B23:hvac_load, F1_house_B24:hvac_load, F1_house_C1:hvac_load, F1_house_C2:hvac_load, F1_house_C10:hvac_load, F1_house_C14:hvac_load, F1_house_C17:hvac_load, F1_house_C18:hvac_load, F1_house_C21:hvac_load, F1_house_C27:hvac_load, F1_house_C29:hvac_load;
};
